<?xml version="1.0"?>

<!-- Volvo RM8B (Modified JT8D-22 with afterburner) -->

<turbine_engine name="Volvo RM8B">
    <milthrust unit="N"> 66600 </milthrust>    <!-- JA-37Di manual -->
    <maxthrust unit="N"> 110300 </maxthrust>    <!-- JA-37Di manual -->
    <bypassratio>     0.97 </bypassratio>    <!-- Turbofan and turbojet engines: database handbook. - JT8D-17A: 1.02. But RM8A is 1.07 and RM8B is 0.97 -->
    <tsfc>            0.63547 </tsfc>    <!-- lbm/hr/lbf from page 5, Australian document and www.globalaircraft.org -->
    <atsfc>           2.5065799568 </atsfc>    <!-- from page 5, Australian document and www.globalaircraft.org -->
    <bleed>           0.03</bleed>    <!-- -->
    <idlen1>         30.0 </idlen1>    <!-- http://www.airliners.net/  Also has a source saying 22%, but had to choose -->
    <idlen2>         57.0 </idlen2>    <!-- JA-37Di manual -->    <!-- http://www.boeing-727.com/ - JT8D-17A : 58.5 -->
    <n1spinup>        1.0 </n1spinup>    <!-- Fan rotor rpm starter acceleration (default 1.0) -->
    <n2spinup>        3.0 </n2spinup>    <!-- Core rotor rpm starter acceleration (default 3.0) -->
    <maxn1>         102.4 </maxn1>    <!-- http://www.boeing-727.com/ -->
    <maxn2>         100.0 </maxn2>    <!-- http://www.boeing-727.com/ -->
    <augmented>         1 </augmented>
    <augmethod>         0 </augmethod>    <!-- controlled from FCS -->
    <injected>          0 </injected>

<!--

    Compressor pressure ratio: 16.5:1
    Overall pressure ratio 44.8:1 (approx)

    ========================
    Fuel consumption conversions and validation
    ========================

    1 kg = 2.2046226 lbm
    1 pound-force (lbf) = 4.448222 N
    6.48 LBM/Gal
    0.2641720523581484 Gal/L

    1 liter = 6.48 x 0.2641720523581484 lbm = 1.711835208 lbm

    MIL
    ===
    AU number (0.64 lbm/hr/lbf)
    __________
    (14972.274315445587023309538058127 lbf)
    max fuel the mil thrust can be supplied from fuel pumps: 8000 liter/h = 13694.681664 lbm/hr
    13694.681664 lbm/hr => 0.91466943334536648648648648648649 lbm/hr/lbf
    That is somewhat larger than 0.64, so 0.64 seems reasonable mil fuel consumption at sealevel M0.0.

    Global Aircraft number (18 mg/N/s)
    ________________________
    18 mg/N/s = 0.000018 Kg/N/s = 0.0648 Kg/N/h = 0.1428595458958007 lbm/hr/N = 0.6354709749637103813554 lbm/hr/lbf

    AUG
    ===
    AU Number (2.52 lbm/hr/lbf)
    ___________
    (24796.424279183907637703334051223 lbf)
    max fuel the aug thrust can be supplied from fuel pumps: 68000 liter/h = 116404.794144 lbm/hr
    116404.794144 lbm/hr => 4.6944185513763551042611060743427 lbm/hr/lbf
    That is much larger than 2.52, so 2.52 seems reasonable aug fuel consumption at sealevel M0.0.

    Global Aircraft number (71 mg/N/s)
    ________________________
    71 mg/N/s = 0.000071 Kg/N/s = 0.2556 Kg/N/h = 0.5635015421445471 lbm/hr/N = 2.5065799568013015902562 lbm/hr/lbf

-->


    <function name="IdleThrust">        <!-- 3.0 kN - JA-37Di manual -->
        <product>
            <value>0.92305</value>            <!-- 3000 N / (0.0488 x 66600) -->
            <table>
                <independentVar lookup="row">velocities/mach</independentVar>
                <independentVar lookup="column">atmosphere/density-altitude</independentVar>
                <tableData>
                         -10000     0     10000   20000   30000   40000   50000   70000
                     0.0  0.0430  0.0488  0.0528  0.0694  0.0899  0.1183  0.1467  0
                     0.2  0.0500  0.0501  0.0335  0.0544  0.0797  0.1049  0.1342  0
                     0.4  0.0040  0.0047  0.0020  0.0272  0.0595  0.0891  0.1203  0
                     0.6  0.0     0.0     0.0     0.0     0.0276  0.0718  0.1073  0
                     0.8  0.0     0.0     0.0     0.0     0.0474  0.0868  0.0900  0
                     1.0  0.0     0.0     0.0     0.0     0.0     0.0552  0.0800  0
                     1.2  0.0     0.0     0.0     0.0     0.0     0.0     0.0700  0
                     1.6  0.0     0.0     0.0     0.0     0.0     0.0     0.0     0
                </tableData>
            </table>
        </product>
    </function>

    <function name="MilThrust">
        <product>
            <table>
                <independentVar lookup="row">velocities/mach</independentVar>
                <independentVar lookup="column">atmosphere/density-altitude</independentVar>
                <tableData>
                    <!-- Aeromatic++ 3.10 - Not calculated using the Stanford Engine Model for RM8B since that will use some undefined cruise thrust, instead of max -->
                          -10000       0   10000   20000   30000   40000   50000   70000
                     0.0   1.2600  1.0000  0.7400  0.5340  0.3720  0.2410  0.1490  0
                     0.2   1.1710  0.9340  0.6970  0.5060  0.3550  0.2310  0.1430  0
                     0.4   1.1500  0.9210  0.6920  0.5060  0.3570  0.2330  0.1450  0
                     0.6   1.1810  0.9510  0.7210  0.5320  0.3780  0.2480  0.1540  0
                     0.8   1.2580  1.0200  0.7820  0.5820  0.4170  0.2750  0.1700  0
                     1.0   1.3690  1.1200  0.8710  0.6510  0.4750  0.3150  0.1950  0
                     1.2   1.4850  1.2300  0.9750  0.7440  0.5450  0.3640  0.2250  0
                     1.4   1.5941  1.3400  1.0860  0.8450  0.6280  0.4240  0.2630  0
                </tableData>
            </table>
        </product>
    </function>

  <!-- Aeromatic++ 3.10 using 0.97 bypass ratio (not used yet):
  <function name="MilThrust">
   <table>
    <independentVar lookup="row">velocities/mach</independentVar>
    <independentVar lookup="column">atmosphere/density-altitude</independentVar>
    <tableData>
          -10000       0   10000   20000   30000   40000   50000   60000
      0.0  1.2600  1.0000  0.7400  0.5340  0.3720  0.2410  0.1490  0.0000
      0.2  1.1460  0.9141  0.6821  0.4952  0.3474  0.2261  0.1399  0.0000
      0.4  1.1009  0.8817  0.6625  0.4844  0.3418  0.2231  0.1388  0.0000
      0.6  1.1054  0.8901  0.6748  0.4979  0.3538  0.2321  0.1441  0.0000
      0.8  1.1506  0.9329  0.7152  0.5323  0.3814  0.2515  0.1555  0.0000
      1.0  1.2229  1.0005  0.7781  0.5815  0.4243  0.2814  0.1742  0.0000
      1.2  1.2949  1.0725  0.8502  0.6487  0.4752  0.3174  0.1962  0.0000
      1.4  1.3560  1.1398  0.9238  0.7188  0.5342  0.3607  0.2237  0.0000
    </tableData>
   </table>
  </function>-->

    <function name="AugThrust">
        <product>
            <property>propulsion/engine/zone-factor</property>
            <table>
                <independentVar lookup="row">velocities/mach</independentVar>
                <independentVar lookup="column">atmosphere/density-altitude</independentVar>
                <tableData>
                    <!-- Aeromatic++ 3.10 - Not calculated using the Stanford Engine Model for RM8B since that will use some undefined cruise thrust, instead of max -->
                           -10000       0   10000   20000   30000   40000   50000   70000
                     0.0    1.1816  1.0000  0.8184  0.6627  0.5280  0.3756  0.2327  0
                     0.2    1.1308  0.9599  0.7890  0.6406  0.5116  0.3645  0.2258  0
                     0.4    1.1150  0.9474  0.7798  0.6340  0.5070  0.3615  0.2240  0
                     0.6    1.1284  0.9589  0.7894  0.6420  0.5134  0.3661  0.2268  0
                     0.8    1.1707  0.9942  0.8177  0.6647  0.5309  0.3784  0.2345  0
                     1.0    1.2411  1.0529  0.8648  0.7017  0.5596  0.3983  0.2467  0
                     1.2    1.3287  1.1254  0.9221  0.7462  0.5936  0.4219  0.2614  0
                     1.4    1.4365  1.2149  0.9933  0.8021  0.6360  0.4509  0.2794  0
                     1.6    1.5711  1.3260  1.0809  0.8700  0.6874  0.4860  0.3011  0
                     1.8    1.7301  1.4579  1.1857  0.9512  0.7495  0.5289  0.3277  0
                     2.0    1.8314  1.5700  1.3086  1.0474  0.8216  0.5786  0.3585  0
                     2.2    1.9700  1.6900  1.4100  1.2400  0.9100  0.6359  0.3940  0
                     2.4    2.0700  1.8000  1.5300  1.3400  1.0000  0.7200  0.4600  0
                     2.6    2.2000  1.9200  1.6400  1.4400  1.1000  0.8000  0.5200  0
                </tableData>
            </table>
        </product>
    </function>
</turbine_engine>
