<?xml version="1.0"?>

<turbine_engine name="Volvo RM8X">
  <milthrust unit="N">  65600 </milthrust>    <!-- AJS-37 manual -->
  <maxthrust unit="N"> 115600 </maxthrust>    <!-- AJS-37 manual -->
  <bypassratio>     1.07 </bypassratio><!-- Turbofan and turbojet engines: database handbook. -->
  <tsfc>            0.2 </tsfc>
  <atsfc>           2.5 </atsfc>
  <bleed>           0.03</bleed>
  <ignitionn1>      5   </ignitionn1> <!-- made up -->
  <ignitionn2>      20  </ignitionn2> <!-- should match 100% GTS rpm in jsb-engine.xml -->
  <idlen1>         30.0 </idlen1>    <!-- http://www.airliners.net/  Also has a source saying 22%, had to choose -->
  <idlen2>         59.0 </idlen2>    <!-- AJS-37 manual -->
  <maxn1>         102.4 </maxn1>    <!-- http://www.boeing-727.com/ -->
  <maxn2>          97.3 </maxn2>    <!-- JA-37Di manual -->
  <n1spinup>        0.5 </n1spinup>   <!-- acceleration by starter, up to igitionn* -->
  <n2spinup>        2.5 </n2spinup>   <!-- <5s to 50% GTS (= 10% N2) -->
  <n1startrate>     1.0 </n1startrate>    <!-- acceleration after 15% N2 up to idle -->
  <n2startrate>     1.6 </n2startrate>    <!-- 30 / 40s to idle from full stop, so a bit less than 30s from 15% -->
  <n1spindown>      1.5 </n1spindown>     <!-- spindown factor -->
  <n2spindown>      1.5 </n2spindown>
  <augmented>         1 </augmented>
  <augmethod>         2 </augmethod>
  <injected>          0 </injected>

  <function name="IdleThrust">
    <value>0</value>
  </function>

  <function name="MilThrust">
    <value>3</value>
  </function>

  <function name="AugThrust">
    <value>10</value>
  </function>

</turbine_engine>
