<?xml version="1.0"?>


<!--


  ****************** IMPORTANT NOTICES **********************

   This is an alpha version release of the DATCOM+ program for
   JSBSIM. Nothing, and I do mean NOTHING, as been checked to
   verify that the parameters, units, sign conventions, or
   basically anything else is correct. Your mileage may vary.

   ***********************************************************

   This file was generated by Datcom+, a superset of
    the USAF Digital DATCOM program.
   This file is considered an intermediary file in the
   DATCOM/JSBSim process. This file may be overwritten without
   warning, so any changes that you make in here may be lost.

   If you intend to use this file as it is and modify it, make
   sure that you take the necessary precautions to prevent it
   from being overwritten, like renaming it.


   ***********************************************************


   DISCLAIMER REQUIRED BY HQ USAF FOR PUBLIC RELEASE APPROVAL

   THIS SOFTWARE AND ANY ACCOMPANYING DOCUMENTATION
   IS RELEASED "AS IS".  THE U.S. GOVERNMENT MAKES NO
   WARRANTY OF ANY KIND, EXPRESS OR IMPLIED, CONCERNING
   THIS SOFTWARE AND ANY ACCOMPANYING DOCUMENTATION,
   INCLUDING, WITHOUT LIMITATION, ANY WARRANTIES OF
   MERCHANTABILITY OR FITNESS FOR A PARTICULAR PURPOSE.
   IN NO EVENT WILL THE U.S. GOVERNMENT BE LIABLE FOR ANY
   DAMAGES, INCLUDING LOST PROFITS, LOST SAVINGS OR OTHER
   INCIDENTAL OR CONSEQUENTIAL DAMAGES ARISING OUT OF THE
   USE, OR INABILITY TO USE, THIS SOFTWARE OR ANY
   ACCOMPANYING DOCUMENTATION, EVEN IF INFORMED IN ADVANCE
   OF THE POSSIBILITY OF SUCH DAMAGES.


   ***********************************************************
-->


<!-- **********************************************************************
        AERODYNAMICS
     **********************************************************************
-->


   <aerodynamics>

      <!-- **************************************
                ASSUMPTIONS AND LIMITATIONS

           There is no interaction between deflected surfaces modeled
           so there is no change in elevator effects with the flaps
           deflected, for example.

           Terms known to be missing from DATCOM:
              Power effects
              Ground effects
              Cyr, CyDr, Cyda, ClDr, Cndr

           **************************************
      -->


      <!--
           The following ground effect tables are NOT generated
           by DATCOM, but provide representative effects.
           These terms are not currently used in this model.
      -->

<!-- from DATCOM -->
      <function name="aero/function/ground-effect-factor-lift">
         <description>Change in lift due to ground effect factor</description>
         <product>
            <table>
               <independentVar lookup="row">aero/h_b-mac-ft</independentVar>
               <tableData>
                  0.0  1.203
                  0.1  1.127
                  0.15 1.090
                  0.2  1.073
                  0.3  1.046
                  0.4  1.055
                  0.5  1.019
                  0.6  1.013
                  0.7  1.008
                  0.8  1.006
                  0.9  1.003
                  1.0  1.002
                  1.1  1.0
               </tableData>
            </table>
         </product>
      </function>
<!-- from DATCOM -->
      <function name="aero/function/ground-effect-factor-drag">
         <description>Change in drag due to ground effect</description>
         <product>
            <table>
               <independentVar lookup="row">aero/h_b-mac-ft</independentVar>
               <tableData>
                  0.0  0.480
                  0.1  0.515
                  0.15 0.629
                  0.2  0.709
                  0.3  0.815
                  0.4  0.882
                  0.5  0.928
                  0.6  0.962
                  0.7  0.988
                  0.8  1.0
                  0.9  1.0
                  1.0  1.0
                  1.1  1.0
               </tableData>
            </table>
         </product>
      </function>
<!-- from F-16 -->
            <function name="aero/coefficient/CDDsb">
                <description>Drag_due_to_speedbrake_deflection</description>
                <product>
                    <property>aero/qbar-psf</property>
                    <property>metrics/Sw-sqft</property>
                    <property>fcs/speedbrake-pos-rad</property>
                      <table>
                          <independentVar>aero/alpha-rad</independentVar>
                          <tableData>
                              -0.1750 -0.0545
                              -0.0870 -0.0225
                               0.0000  0.0096
                               0.0870  0.0590
                               0.1750  0.1244
                               0.2620  0.2182
                               0.3490  0.2324
                               0.4360  0.2029
                               0.5240  0.1435
                               0.6110  0.1046
                               0.6980  0.1363
                               0.7850  0.1196
                          </tableData>
                      </table>
                </product>
            </function>
<!-- from F-16 -->
            <function name="aero/coefficient/CLDsb">
                <description>Lift_due_to_speedbrake_deflection</description>
                <product>
                    <property>aero/qbar-psf</property>
                    <property>metrics/Sw-sqft</property>
                    <property>fcs/speedbrake-pos-rad</property>
                      <table>
                          <independentVar>aero/alpha-rad</independentVar>
                          <tableData>
                              -0.1750  0.3645
                              -0.0870  0.3678
                              0.0000   0.3684
                              0.0870   0.2522
                              0.1750   0.2710
                              0.2620   0.3615
                              0.3490   0.1283
                              0.4360   0.0075
                              0.5240  -0.1311
                              0.6110  -0.1836
                              0.6980  -0.1161
                              0.7850  -0.1064
                          </tableData>
                      </table>
                </product>
            </function>
<!-- from F-16 -->
            <function name="aero/coefficient/CmDsb">
             <description>Change_in_Pitch_moment_due_to_speedbrake</description>
                <product>
                    <property>aero/qbar-psf</property>
                    <property>metrics/Sw-sqft</property>
                    <property>metrics/cbarw-ft</property>
                    <property>fcs/speedbrake-pos-rad</property>
                      <table>
                          <independentVar>aero/alpha-rad</independentVar>
                          <tableData>
                              -0.1750   -0.0036
                              -0.0870   -0.0036
                               0.0000   -0.0036
                               0.0870    0.0303
                               0.1750    0.0225
                               0.2620    0.0128
                               0.3490    0.0252
                               0.4360    0.0275
                               0.5240   -0.0171
                               0.6110   -0.0448
                               0.6980   -0.0737
                               0.7850   -0.0884
                          </tableData>
                      </table>
                </product>
            </function>


<!-- ********************************************************************** -->


     <axis name="LIFT">

         <!-- from DATCOM -->
         <function name="aero/coefficient/CLwbh">
            <description>
               Lift due to alpha
               Increase in CL decreases Period and damping,Dutch Roll damping
               CL is low for landing
            </description>
            <product>
               <property>aero/function/ground-effect-factor-lift</property>
               <property>aero/qbar-psf</property>
               <property>metrics/Sw-sqft</property>
               <table>
                  <independentVar lookup="row">aero/alpha-deg</independentVar>
                  <tableData>
                       -16.00        -2.955
                       -8.000        -1.475
                       -6.000        -1.148
                       -4.000        -.8228
                       -2.000        -.4100
                         .000          .000
                        2.000         .4100
                        4.000         .8228
                        8.000         1.475
                        9.000         1.659
                        10.00         1.842
                        12.00         2.211
                        14.00         2.586
                        16.00         2.955
                        18.00         3.305
                        19.00         3.479
                        20.00         3.652
                        21.00         3.825
                        22.00         3.996
                        24.00         4.330
                  </tableData>
               </table>
            </product>
         </function>

         <!-- from F-16 -->
         <function name="aero/coefficient/CLDflaps">
                <description>Lift due to canard flaps</description>
                <product>
                    <property>aero/qbar-psf</property>
                    <property>metrics/Sw-sqft</property>
                    <property>fcs/flap-pos-norm</property>
                    <property>aero/function/ground-effect-factor-lift</property>
                    <value>0.5</value>
                </product>
            </function>

     </axis>


<!-- ********************************************************************** -->


     <axis name="DRAG">

         <!-- from DATCOM -->
         <function name="aero/coefficient/CD">
            <description>
               Basic Drag Coefficient
               Sense: Always positive
               Main contributor to Phugoid damping: Greater Cd, Better damping
            </description>
            <product>
               <property>aero/function/ground-effect-factor-lift</property>
               <property>aero/qbar-psf</property>
               <property>metrics/Sw-sqft</property>
               <table>
                  <independentVar lookup="row">aero/alpha-deg</independentVar>
                  <tableData>
                       -16.00         .7011
                       -8.000         .1984
                       -6.000         .1307
                       -4.000         .8139E-01
                       -2.000         .4764E-01
                         .000         .3645E-01
                        2.000         .4764E-01
                        4.000         .8139E-01
                        8.000         .1984
                        9.000         .2416
                        10.00         .2901
                        12.00         .4033
                        14.00         .5404
                        16.00         .7011
                        18.00         .8822
                        19.00         .9818
                        20.00         1.088
                        21.00         1.198
                        22.00         1.315
                        24.00         1.566
                  </tableData>
               </table>
            </product>
         </function>

         <!-- from F-16 -->
          <function name="aero/coefficient/CDgear">
                <description>Drag_due_to_gear</description>
                <product>
                    <property>aero/qbar-psf</property>
                    <property>metrics/Sw-sqft</property>
                    <property>gear/gear-pos-norm</property>
                    <value>0.3</value>
                </product>
            </function>
          <function name="aero/coefficient/CDDflaps">
                <description>Drag due to flaps</description>
                <product>
                    <property>aero/qbar-psf</property>
                    <property>metrics/Sw-sqft</property>
                    <property>fcs/flap-pos-norm</property>
                    <value>0.1</value>
                </product>
            </function>
     </axis>


<!-- ********************************************************************** -->


        <axis name="SIDE">

<!-- from DATCOM -->
         <function name="aero/coefficient/Cyb">
            <description>
               Side Force coefficient due to Sideslip(per degree)
                Contributes to damping of Dutch Roll mode
            </description>
            <product>
               <property>aero/qbar-psf</property>
               <property>metrics/Sw-sqft</property>
               <property>aero/beta-deg</property>
               <table>
                  <independentVar lookup="row">aero/alpha-deg</independentVar>
                  <tableData>
                       -16.00        -.8537E-02
                       -8.000        -.8537E-02
                       -6.000        -.8537E-02
                       -4.000        -.8537E-02
                       -2.000        -.8537E-02
                         .000        -.8537E-02
                        2.000        -.8537E-02
                        4.000        -.8537E-02
                        8.000        -.8537E-02
                        9.000        -.8537E-02
                        10.00        -.8537E-02
                        12.00        -.8537E-02
                        14.00        -.8537E-02
                        16.00        -.8537E-02
                        18.00        -.8537E-02
                        19.00        -.8537E-02
                        20.00        -.8537E-02
                        21.00        -.8537E-02
                        22.00        -.8537E-02
                        24.00        -.8537E-02
                  </tableData>
               </table>
            </product>
         </function>


     </axis>


<!-- ********************************************************************** -->


     <axis name="ROLL">


         <!--<function name="aero/coefficient/Clb">
            <description>
               Roll Moment coefficient due to Beta(per degree)
               Decrease of Clb to small negative value improves Dutch Roll Damping
               High Positive value leads to excessive spiral instability
            </description>
            <product>
               <property>aero/qbar-psf</property>
               <property>metrics/Sw-sqft</property>
               <property>metrics/bw-ft</property>
               <property>aero/beta-deg</property>
               <table>
                  <independentVar lookup="row">aero/alpha-deg</independentVar>
                  <tableData>
                       -16.00         .1017
                       -8.000         .5271E-01
                       -6.000         .4188E-01
                       -4.000         .3112E-01
                       -2.000         .1746E-01
                         .000         .3894E-02
                        2.000        -.9672E-02
                        4.000        -.2333E-01
                        8.000        -.4492E-01
                        9.000        -.5099E-01
                        10.00        -.5706E-01
                        12.00        -.6927E-01
                        14.00        -.8168E-01
                        16.00        -.9386E-01
                        18.00        -.1054
                        19.00        -.1112
                        20.00        -.1169
                        21.00        -.1227
                        22.00        -.1283
                        24.00        -.1394
                  </tableData>
               </table>
            </product>
         </function>-->
<!-- from F-16 -->
      <function name="aero/moment/Roll_damp">
       <description>Roll moment due to roll rate</description>
       <product>
           <property>aero/qbar-psf</property>
           <property>metrics/Sw-sqft</property>
           <property>metrics/bw-ft</property>
           <property>aero/bi2vel</property>
           <property>velocities/p-aero-rad_sec</property>
           <value>-2</value>
       </product>
    </function>-->
<!-- from F-16 -->
    <function name="aero/moment/Roll_yaw">
       <description>Roll moment due to yaw rate</description>
       <product>
           <property>aero/qbar-psf</property>
           <property>metrics/Sw-sqft</property>
           <property>metrics/bw-ft</property>
           <property>aero/bi2vel</property>
           <property>velocities/r-aero-rad_sec</property>
           <value>0.15</value>
       </product>
    </function>
<!-- from F-16 -->
    <function name="aero/moment/Roll_aileron">
       <description>Roll moment due to aileron</description>
       <product>
          <property>aero/qbar-psf</property>
          <property>metrics/Sw-sqft</property>
          <property>metrics/bw-ft</property>
          <property>fcs/left-aileron-pos-rad</property>
          <value>0.2</value>
       </product>
    </function>
<!-- from F-16 -->
    <function name="aero/moment/Roll_rudder">
       <description>Roll moment due to rudder</description>
       <product>
           <property>aero/qbar-psf</property>
           <property>metrics/Sw-sqft</property>
           <property>metrics/bw-ft</property>
           <property>fcs/rudder-pos-rad</property>
           <value>0.01</value>
       </product>
    </function>

     </axis>


<!-- ********************************************************************** -->


     <axis name="PITCH">


          <!--<function name="aero/coefficient/Cm_basic">
            <description>
               Basic_Pitch_moment_coefficient
            </description>
            <product>
               <property>aero/qbar-psf</property>
               <property>metrics/Sw-sqft</property>
               <property>metrics/cbarw-ft</property>
               <table>
                  <independentVar lookup="row">aero/alpha-deg</independentVar>
                  <tableData>
                       -16.00         2.370
                       -8.000         2.370
                       -6.000         2.370
                       -4.000         2.370
                       -2.000         2.370
                         .000         2.370
                        2.000         2.370
                        4.000         2.370
                        8.000         2.370
                        9.000         2.370
                        10.00         2.370
                        12.00         2.370
                        14.00         2.370
                        16.00         2.370
                        18.00         2.370
                        19.00         2.370
                        20.00         2.370
                        21.00         2.370
                        22.00         2.370
                        24.00         2.370
                  </tableData>
               </table>
            </product>
         </function>-->
<!-- from F-16 -->
         <function name="aero/moment/Pitch_alpha">
       <description>Pitch moment due to alpha</description>
       <product>
           <property>aero/qbar-psf</property>
           <property>metrics/Sw-sqft</property>
           <property>metrics/cbarw-ft</property>
           <property>aero/alpha-rad</property>
           <value>-0.3</value>
       </product>
    </function>
<!-- from F-16 -->
    <function name="aero/moment/Pitch_elevator">
       <description>Pitch moment due to elevator</description>
       <product>
          <property>aero/qbar-psf</property>
          <property>metrics/Sw-sqft</property>
          <property>metrics/cbarw-ft</property>
          <property>fcs/elevator-pos-rad</property>
          <table>
            <independentVar lookup="row">velocities/mach</independentVar>
            <tableData>
              0.0     -0.800
              2.0     -0.200
            </tableData>
          </table>
       </product>
    </function>
<!-- from F-16 -->
    <function name="aero/moment/Pitch_damp">
       <description>Pitch moment due to pitch rate</description>
       <product>
           <property>aero/qbar-psf</property>
           <property>metrics/Sw-sqft</property>
           <property>metrics/cbarw-ft</property>
           <property>aero/ci2vel</property>
           <property>velocities/q-aero-rad_sec</property>
           <value>-18</value>
       </product>
    </function>
<!-- from F-16 -->
    <function name="aero/moment/Pitch_alphadot">
       <description>Pitch moment due to alpha rate</description>
       <product>
           <property>aero/qbar-psf</property>
           <property>metrics/Sw-sqft</property>
           <property>metrics/cbarw-ft</property>
           <property>aero/ci2vel</property>
           <property>aero/alphadot-rad_sec</property>
           <value>-9</value>
       </product>
    </function>

     </axis>


<!-- ********************************************************************** -->


     <axis name="YAW">


         <!--<function name="aero/coefficient/Cnb">
            <description>
               Yaw moment coefficient due to sideslip(per degree)
               Determines Dutch Roll and Spiral characteristics
               Prevents side-slip and yawing moments
            </description>
            <product>
               <property>aero/qbar-psf</property>
               <property>metrics/Sw-sqft</property>
               <property>metrics/bw-ft</property>
               <property>aero/beta-deg</property>
               <table>
                  <independentVar lookup="row">aero/alpha-deg</independentVar>
                  <tableData>
                       -16.00        -.1249E-01
                       -8.000        -.1249E-01
                       -6.000        -.1249E-01
                       -4.000        -.1249E-01
                       -2.000        -.1249E-01
                         .000        -.1249E-01
                        2.000        -.1249E-01
                        4.000        -.1249E-01
                        8.000        -.1249E-01
                        9.000        -.1249E-01
                        10.00        -.1249E-01
                        12.00        -.1249E-01
                        14.00        -.1249E-01
                        16.00        -.1249E-01
                        18.00        -.1249E-01
                        19.00        -.1249E-01
                        20.00        -.1249E-01
                        21.00        -.1249E-01
                        22.00        -.1249E-01
                        24.00        -.1249E-01
                  </tableData>
               </table>
            </product>
         </function>-->

         <!--<function name="aero/coefficient/Cnp">
            <description>
               Yaw moment coefficient due to roll rate(per degree)
               Reduces Dutch Roll damping
               positive value desireable
            </description>
            <product>
               <property>aero/qbar-psf</property>
               <property>metrics/Sw-sqft</property>
               <property>metrics/bw-ft</property>
               <property>aero/bi2vel</property>
               <property>velocities/p-aero-rad_sec</property>
               <table>
                  <independentVar lookup="row">aero/alpha-deg</independentVar>
                  <tableData>
                       -16.00          .000
                       -8.000          .000
                       -6.000          .000
                       -4.000          .000
                       -2.000          .000
                         .000          .000
                        2.000          .000
                        4.000          .000
                        8.000          .000
                        9.000          .000
                        10.00          .000
                        12.00          .000
                        14.00          .000
                        16.00          .000
                        18.00          .000
                        19.00          .000
                        20.00          .000
                        21.00          .000
                        22.00          .000
                        24.00          .000
                  </tableData>
               </table>
            </product>
         </function>

         <function name="aero/coefficient/Cnr">
            <description>
               Yaw Moment coefficient due to yaw rate(per degree)
               Main contributor to damping of Dutch Roll
            </description>
            <product>
               <property>aero/qbar-psf</property>
               <property>metrics/Sw-sqft</property>
               <property>metrics/bw-ft</property>
               <property>aero/bi2vel</property>
               <property>velocities/r-aero-rad_sec</property>
               <table>
                  <independentVar lookup="row">aero/alpha-deg</independentVar>
                  <tableData>
                       -16.00          .000
                       -8.000          .000
                       -6.000          .000
                       -4.000          .000
                       -2.000          .000
                         .000          .000
                        2.000          .000
                        4.000          .000
                        8.000          .000
                        9.000          .000
                        10.00          .000
                        12.00          .000
                        14.00          .000
                        16.00          .000
                        18.00          .000
                        19.00          .000
                        20.00          .000
                        21.00          .000
                        22.00          .000
                        24.00          .000
                  </tableData>
               </table>
            </product>
         </function>-->


         <!-- ******************************************************
              CnDr is not calculated by DATCOM+, but a default value
              is supplied
              ******************************************************-->

         <!--<function name="aero/coefficient/CnDr">
            <description>
               Yaw Coefficient due to rudder(DATCOM does not calculate)
               High value for controllablity, low value
               for good dynamic stability
            </description>
            <product>
               <property>aero/qbar-psf</property>
               <property>metrics/Sw-sqft</property>
               <property>metrics/bw-ft</property>
               <property>fcs/rudder-pos-deg</property>
               <value>  -.1047E-02</value>
            </product>
         </function>-->
<!-- from F-16 -->
<function name="aero/moment/Yaw_damp">
       <description>Yaw moment due to yaw rate</description>
       <product>
           <property>aero/qbar-psf</property>
           <property>metrics/Sw-sqft</property>
           <property>metrics/bw-ft</property>
           <property>aero/bi2vel</property>
           <property>velocities/r-aero-rad_sec</property>
           <value>-0.15</value>
       </product>
    </function>
    <!-- from F-16 -->
      <function name="aero/moment/Yaw_beta">
       <description>Yaw moment due to beta</description>
       <product>
           <property>aero/qbar-psf</property>
           <property>metrics/Sw-sqft</property>
           <property>metrics/bw-ft</property>
           <property>aero/beta-rad</property>
           <value>0.12</value>
       </product>
    </function>
    <!-- from F-16 -->
    <function name="aero/moment/Yaw_aileron">
       <description>Adverse yaw</description>
       <product>
           <property>aero/qbar-psf</property>
           <property>metrics/Sw-sqft</property>
           <property>metrics/bw-ft</property>
           <property>fcs/left-aileron-pos-rad</property>
           <value>0</value>
       </product>
    </function>
    <!-- from F-16 -->
    <function name="aero/moment/Yaw_rudder">
       <description>Yaw moment due to rudder</description>
       <product>
           <property>aero/qbar-psf</property>
           <property>metrics/Sw-sqft</property>
           <property>metrics/bw-ft</property>
           <property>fcs/rudder-pos-rad</property>
           <value>-0.1</value>
       </product>
    </function>

     </axis>


<!-- ********************************************************************** -->


   </aerodynamics>
