<?xml version="1.0"?>

<flight_control name="JA37 FC">
    <channel name="Canopy">

        <!-- canopy get stuck if it fail -->
        <switch name="fails/canopy">
          <default value="fcs/canopy/engage"/>
          <test logic="OR" value="fcs/canopy-pos-norm">
            fcs/canopy/serviceable == 0
            fcs/canopy/has-power == 0
          </test>
          <output>fcs/canopy-engageTmp</output>
        </switch>

        <kinematic name="fcs/canopy-control">
            <input>fcs/canopy-engageTmp</input>
            <traverse>
                <setting>
                    <position>0.0</position>
                    <time>0.0</time>
                </setting>
                <setting>
                    <position>1.0</position>
                    <time>5.0</time>
                </setting>
            </traverse>
            <output>fcs/canopy-pos-norm</output>
        </kinematic>

        <pure_gain name="Canopy MP">
          <input>fcs/canopy-pos-norm</input>
          <gain>1</gain>
          <output>/canopy/position-norm</output><!-- used for auto MP transmit -->
      </pure_gain>
    </channel>

<!--
                   Elevator -25 to +20  (page 131, figure 108b)
                   Elevator -25 to +20  (page 133, figure 110a)
                   Elevator -25 to +20  (page  79, figure  62a)
                   Pretty sure I saw something about max +10 for elevator, but do not know where.

                   Aileron  -15 to +15  (page 133, figure 110b)

                   Rudder   -25 to +25  (page 115, figure  92 )

                   Flaps           +30  (page  87)
                   Flaps     -4 to +30  (page  78,  figure 60 )
                   Flaps     -7 to +30  (page  76) -7 can be selected by pilot in AJ-37 not JA-37, -4 default
                   Flaps     -7 to +30  (page  46)

-->


    <channel name="Elevons">
      <!-- Can move 20 degrees down, and 25 degrees up, pitching down restricted to 10 degrees -->
      <summer name="Pitch Trim Sum">
          <input>fcs/elevator-cmd-norm</input>
          <input>fcs/pitch-trim-cmd-norm</input>
          <clipto>
              <min>-1.0</min>
              <max>1.0</max>
          </clipto>
          <output>fcs/pitch-trim-sum</output>
      </summer>

      <!-- At high speeds elevator up deflection is reduced,
           At high altitude elevator up deflection is increased -->
      <scheduled_gain name="fcs/elevator-adjust-neg">
        <input>fcs/pitch-trim-sum</input>
        <table>
          <independentVar lookup="row">velocities/mach</independentVar>
          <independentVar lookup="column">atmosphere/density-altitude</independentVar>
          <tableData>
                          0.0      20000     45000
              0.0         1.00      1.00      1.00
              0.5         1.00      1.00      1.00
              0.625       0.85      1.00      1.00
              0.75        0.45      1.00      1.00
              1.0         0.18      0.60      1.00
              1.5         0.10      0.20      1.00
              2.2         0.05      0.10      0.30
          </tableData>
        </table>
        <output>fcs/elevator-cmd-adjust-negative</output>
      </scheduled_gain>

      <!--<pure_gain name="testot"> when using this remember to make AAA in -set file
        <input>fcs/elevator-cmd-adjust-negativeTmp</input>
        <gain>AAA</gain>
        <output>fcs/elevator-cmd-adjust-negative</output>
      </pure_gain>-->

      <!-- At high speeds elevator down deflection is reduced,
           At high altitude elevator down deflection is increased -->
      <scheduled_gain name="fcs/elevator-adjust-pos">
        <input>fcs/pitch-trim-sum</input>
        <table>
          <independentVar lookup="row">velocities/mach</independentVar>
          <independentVar lookup="column">atmosphere/density-altitude</independentVar>
          <tableData>
                          0.0       45000.0
              0.0         1.00         1.0
              0.5         1.00         1.0
              0.625       0.85         1.0
              0.75        0.25         1.0
              1.0         0.08         1.0
              2.2         0.03         0.2
          </tableData>
        </table>
        <output>fcs/elevator-cmd-adjust-positive</output>
      </scheduled_gain>

      <!-- select which of the above tables is active -->
      <switch name="fcs/elevator-cmd-adjusted">
        <default value="fcs/elevator-cmd-adjust-positive"/>
        <test logic="OR" value="fcs/elevator-cmd-adjust-negative">
          fcs/pitch-trim-sum lt 0
          fcs/mouse-optimized == 1
        </test>
      </switch>

      <aerosurface_scale name="Elevator Control">
          <input>fcs/elevator-cmd-adjusted</input>
          <zero_centered> true </zero_centered>
          <domain>
            <min> -1.0 </min>
            <max>  1.0 </max>
          </domain>
          <range>
              <min>-0.4363</min><!--  -25 deg -->
              <max>0.3491</max><!--    20 deg -->
          </range>
          <output>fcs/elevator-pos-radTmp</output>
      </aerosurface_scale>

      <!-- elevator wont deploy if they fail -->
      <switch name="fails/elevator">
        <default value="fcs/elevator-pos-radTmp"/>
        <test value="0">
          fcs/elevator-serviceable == 0
        </test>
        <output>fcs/elevator-pos-rad</output>
      </switch>

      <!--<aerosurface_scale name="Elevator Control Degrees">
          <input>fcs/pitch-trim-sum</input>
          <range>
              <min>-25</min>
              <max>20</max>
          </range>
          <output>fcs/elevator-pos-deg</output>
      </aerosurface_scale>-->

      <summer name="Roll Trim Sum">
          <input>fcs/aileron-cmd-norm</input>
          <input>fcs/roll-trim-cmd-norm</input>
          <clipto>
              <min>-1.0</min>
              <max>1.0</max>
          </clipto>
          <output>fcs/roll-trim-sumTmp</output>
      </summer>

      <!-- aileron wont deploy if they fail -->
      <switch name="fails/aileron">
        <default value="fcs/roll-trim-sumTmp"/>
        <test value="0">
          fcs/aileron-serviceable == 0
        </test>
        <output>fcs/roll-trim-sum-fail</output>
      </switch>

      <!-- At high speeds aileron deflection is reduced -->
      <scheduled_gain name="fcs/aileron-mach">
        <input>fcs/roll-trim-sum-fail</input>
        <table>
          <independentVar lookup="row">velocities/mach</independentVar>
          <independentVar lookup="column">atmosphere/density-altitude</independentVar>
          <tableData>
                          0.0         60000.0
              0.0         0.47           1.0
              0.5         0.40           0.75
              1.0         0.20           0.45
              2.2         0.06           0.225
          </tableData>
        </table>
        <output>fcs/aileron-sum-mach</output>
      </scheduled_gain>

      <aerosurface_scale name="Left Aileron Control">
          <input>fcs/aileron-sum-mach</input>
          <domain>
            <min> -1.0 </min>
            <max>  1.0 </max>
          </domain>
          <range>
              <min>-0.2618</min><!-- -15 deg -->
              <max>0.2618</max><!--   15 deg -->
          </range>
          <output>fcs/left-aileron-pos-rad</output>
      </aerosurface_scale>

      <aerosurface_scale name="Right Aileron Control">
          <input>-fcs/aileron-sum-mach</input>
          <domain>
            <min> -1.0 </min>
            <max>  1.0 </max>
          </domain>
          <range>
               <min>-0.2618</min><!-- -15 deg -->
              <max>0.2618</max><!--   15 deg -->
          </range>
          <output>fcs/right-aileron-pos-rad</output>
      </aerosurface_scale>

      <pure_gain>
          <input>fcs/left-aileron-pos-rad</input>
          <gain>57.296</gain>
          <output>fcs/left-aileron-pos-deg</output>
      </pure_gain>

      <summer name="Left Elevon Pos Rad">
         <input>fcs/left-aileron-pos-rad</input>
         <input>fcs/elevator-pos-rad</input>
         <output>fcs/left-elevon-pos-rad</output>
      </summer>

      <summer name="Right Elevon Pos Rad">
         <input>fcs/right-aileron-pos-rad</input>
         <input>fcs/elevator-pos-rad</input>
         <output>fcs/right-elevon-pos-rad</output>
      </summer>

      <pure_gain name="Left Elevon Pos Deg">
          <input>fcs/left-elevon-pos-rad</input>
          <gain>57.296</gain>
          <output>fcs/left-aileron-pos-norm</output><!-- is really deg, but use this for MP transmit -->
      </pure_gain>

      <pure_gain name="Right Elevon Pos Deg">
          <input>fcs/right-elevon-pos-rad</input>
          <gain>57.296</gain>
          <output>fcs/right-aileron-pos-norm</output><!-- is really deg, but use this for MP transmit -->
      </pure_gain>
    </channel>

    <channel name="Yaw">
      <!-- Can move 20 degrees to each side -->
      <summer name="Rudder Command Sum">
        <input>fcs/rudder-cmd-norm</input>
        <input>fcs/yaw-trim-cmd-norm</input>
        <clipto>
          <min> -1.0 </min>
          <max>  1.0 </max>
        </clipto>
      </summer>
      <scheduled_gain name="Yaw Damper Rate">
        <input>velocities/r-aero-rad_sec</input>
        <table>
          <independentVar lookup="row">velocities/ve-kts</independentVar>
          <independentVar lookup="column">fcs/yaw-damper/serviceable</independentVar>
          <tableData>
                    0      1
            30.0   0.00  0.00
            60.0   0.00  2.00
         </tableData>
        </table>
        <gain>fcs/yaw-damper/enable</gain>
        <output>fcs/yaw-damper-rate</output>
      </scheduled_gain>
      <summer name="Rudder Sum">
        <input>fcs/rudder-command-sum</input>
        <input>fcs/yaw-damper-rate</input>
        <clipto>
          <min> -1.1 </min>
          <max>  1.1 </max>
        </clipto>
      </summer>
      <!-- rudder will get stuck if it fail -->
      <!--<switch name="Rudder Stuck Control">
        <default value="fcs/rudder-sum"/>
        <test logic="AND" value="fcs/rudder-sum-stuck">
          fcs/rudder/serviceable == 0
        </test>
      </switch>-->
      <aerosurface_scale name="Rudder Control">
        <input>fcs/rudder-sum</input>
        <domain>
          <min> -1.1 </min>
          <max>  1.1 </max>
        </domain>
        <range>
          <min> -0.4363 </min>
          <max>  0.4363 </max><!-- 25 deg -->
        </range>
        <output>fcs/rudder-pos-rad-tmp</output>
      </aerosurface_scale>

      <!-- At high speeds rudder deflection is reduced -->
      <scheduled_gain name="fcs/rudder-mach">
        <input>fcs/rudder-pos-rad-tmp</input>
        <table>
          <independentVar lookup="row">velocities/mach</independentVar>
          <independentVar lookup="column">atmosphere/density-altitude</independentVar>
          <tableData>
                          0.0         70000.0
              0.0         0.60           1.00
              0.5         0.22           0.40
              1.0         0.11           0.25
              2.2         0.05           0.10
          </tableData>
        </table>
        <output>fcs/rudder-pos-rad</output>
      </scheduled_gain>

      <aerosurface_scale name="rudder normalization">
        <input>fcs/rudder-pos-rad</input>
        <domain>
          <min> -0.4363 </min>
          <max>  0.4363 </max><!-- 25 deg -->
        </domain>
        <range>
          <min> -1.0 </min>
          <max>  1.0 </max>
        </range>
        <output>fcs/rudder-pos-norm</output>
      </aerosurface_scale>
    </channel>


    <channel name="Landing Gear">
      <switch name="fcs/gear-wow">
        <default value="0"/>
        <test logic="AND" value="1">

                    gear/unit[1]/WOW eq 1

                    gear/unit[2]/WOW eq 1

                </test>
      </switch>

      <!-- gear wont deploy if they fail -->
      <switch name="fails/gear">
        <default value="gear/gear-cmd-norm"/>
        <test value="0">
          gear/serviceable == 0
        </test>
        <output>gear/gear-cmd-normTmp</output>
      </switch>

      <kinematic name="fcs/gear-control">
        <input>gear/gear-cmd-normTmp</input>
        <traverse>
          <setting>
            <position>0.0</position>
            <time>0.0</time>
          </setting>
          <setting>
            <position>1.0</position>
            <time>5</time>
          </setting>
        </traverse>
        <output>gear/gear-pos-norm</output>
      </kinematic>

      <scheduled_gain name="fcs/scheduled-steer-cmd-delayed">
        <input>fcs/steer-cmd-norm</input>
        <table>
          <independentVar>velocities/vg-fps</independentVar>
          <tableData><!-- note that this is positive also when moving in reverse -->
              10.0        80.0
              20.0        50.0
              50.0        10.0
              150.0       2.5
              200.0       2.0 <!-- by this speed the front wheel hardly touches the runway -->
          </tableData>
        </table>
        <output>fcs/steer-cmd-delayed</output>
      </scheduled_gain>

     <scheduled_gain name="Steering control">
      <input>fcs/steer-cmd-delayed</input>
      <table>
        <independentVar lookup="row">systems/nose-wheel-steering/enable</independentVar>
         <tableData>
            0     0
            1     1
         </tableData>
      </table>
      <output>fcs/steer-pos-deg</output>
     </scheduled_gain>
    </channel>

    <channel name="Flaps">
      <!-- Can move 30 degrees down, and 4 degrees up -->

      <aerosurface_scale name="flaps anti-normalization">
        <input>fcs/flap-pos-cmd</input>
        <zero_centered> false </zero_centered>
        <domain>
          <min>  0.0 </min>
          <max>  1.0 </max>
        </domain>
        <range>
          <min> -4.0 </min>
          <max> 30.0 </max>
        </range>
        <output>fcs/flap-pos-cmd-deg</output>
      </aerosurface_scale>

      <kinematic name="Flaps Control">
        <input>fcs/flap-pos-cmd-deg</input><!-- flaps controlled by gear-->
        <traverse>
          <setting>
            <position>  -4.0 </position>
            <time>      0.0 </time>
          </setting>
          <setting>
            <position> 30.0 </position>
            <time>      3.0 </time>
          </setting>
        </traverse>
        <output>fcs/flap-pos-degTmp</output>
      </kinematic>

      <!-- flaps wont deploy if they fail -->
      <switch name="fails/flaps">
        <default value="fcs/flap-pos-degTmp"/>
        <test logic="OR" value="0">
          fcs/flaps-serviceable == 0
          systems/flapscontrol/serviceable == 0
        </test>
        <output>fcs/flap-pos-deg</output>
      </switch>

      <pure_gain name="Flap pos deg MP">
          <input>fcs/flap-pos-deg</input>
          <gain>1</gain>
          <output>fcs/flap-pos-norm</output><!-- is really deg, used for auto MP transmit -->
      </pure_gain>

      <aerosurface_scale name="flap normalization">
        <input>fcs/flap-pos-deg</input>
        <zero_centered> false </zero_centered>
        <domain>
          <min> -4.0 </min>
          <max> 30.0 </max>
        </domain>
        <range>
          <min> 0.0 </min>
          <max> 1.0 </max>
        </range>
        <output>fcs/flap-pos-normalized</output>
      </aerosurface_scale>
    </channel>

    <!--<channel name="Throttle">
      <pure_gain name="fcs/throttle1">
        <input>fcs/throttle-cmd-norm</input>
        <gain>1.0</gain>
        <output>fcs/throttle-pos-norm</output>
      </pure_gain>
    </channel>    -->

    <channel name="Autopilot">
      <scheduled_gain name="Autopilot max climb">
        <input>autopilot/one</input>
        <table>
          <independentVar lookup="row">velocities/mach</independentVar>
          <tableData>
              0.25            5
              0.5          5000
              1.0         30000
          </tableData>
        </table>
        <output>autopilot/climb</output>
      </scheduled_gain>

      <pure_gain name="Autopilot min climb">
          <input>autopilot/climb</input>
          <gain>-0.2</gain>
          <output>autopilot/descent</output>
      </pure_gain>
    </channel>

    <channel name="Hook">
        <kinematic name="fcs/hook-control">
            <input>fcs/hook-engage</input>
            <traverse>
                <setting>
                    <position>0</position>
                    <time>0</time>
                </setting>
                <setting>
                    <position>1</position>
                    <time>2.5</time>
                </setting>
            </traverse>
            <output>fcs/hook-pos-norm</output>
        </kinematic>
    </channel>

    <!--<channel name="View">
      <summer name="position/h-sl-pilot-ft">
        <input>position/h-sl-ft</input>
        <input>position/selection-view-offset</input>
      </summer>
    </channel>-->

    <channel name="Wings">
      <aerosurface_scale name="Wings normal factor">
        <input>fcs/wings/serviceable</input>
        <zero_centered> false </zero_centered>
        <domain>
          <min>  0.0 </min>
          <max>  1.0 </max>
        </domain>
        <range>
          <min> 0.3 </min>
          <max> 1.0 </max>
        </range>
        <output>fcs/wings/normal-factor</output>
      </aerosurface_scale>
    </channel>
  </flight_control>
