<?xml version="1.0" encoding="UTF-8"?>
<?xml-stylesheet type="text/xsl" href="http://jsbsim.sourceforge.net/JSBSim.xsl"?>


<!--**********************************************************************

                            Main JSBSim Flight Dynamics Model file for JA-37


*************************************************************************-->

<fdm_config xmlns:xsi="http://www.w3.org/2001/XMLSchema-instance" name="Saab JA-37 Viggen" version="2.0" release="BETA" xsi:noNamespaceSchemaLocation="http://jsbsim.sourceforge.net/JSBSim.xsd">
  <fileheader>
    <author> Nikolai V. Chr. </author>
    <filecreationdate> 2013-02-15 </filecreationdate>
    <version> 3.107 </version>
    <license>
      <licenseName>GPL 2 (General Public License version 2)</licenseName>
      <licenseURL>http://www.gnu.org/licenses/old-licenses/gpl-2.0.html</licenseURL>
    </license>
    <description> Models a Saab JA-37 Viggen </description>
    <note>
         This model was created using data that is, or has been, publically
         available by means of (declassified) technical reports, textbooks, image graphs or
         published code. This aircraft description file is in no way related
         to the manufacturer of the real aircraft.
         Neither the name of (any of) the authors nor the names of (any of) the
         manufacturers may be used to endorse or promote products derived from
         this file.

         The data is provided ''as is'' and any express or implied
         warranties, including, but not limitted to the implied warranties of
         merchantability and fitness for a particular purpose are disclaimed.
      </note>

      <reference refID="NASA TM-88403" author="Krister Karling"
       title="Aerodynamics of the Viggen 37 Aircraft" date="June 1986"
       link="http://hdl.handle.net/2060/19860019453"/>

      <reference refID="Temporal final" author="John McIver"
       title="Saab JA-37 Viggen Performance Assessment" date="5th August 2003"
       link="www.temporal.com.au/viggen_final.pdf"/>

      <reference refID="NASA CR-2501" author="Johnston, D. E."
       title="Flight control systems properties and problems. Volume 2: Block diagram compendium"
       date="Feb 01, 1975" link="http://hdl.handle.net/2060/19750009300"/>

      <reference refID="TCDS E2EA" author="U.S. DEPARTMENT OF TRANSPORTATION"
       title="TYPE CERTIFICATE SHEET NO. E2EA: PRATT AND WHITNEY MODELS" date="AUGUST 28, 2007"/>

      <reference refID="NASA TN D-6460" author="Langley Research Center"
       title="PERFORMANCE CHARACTERISTICS OF A SINGLE-ENGINE FIGHTER MODEL FITTED WITH AN IN-FLIGHT THRUST REVERSER" date="SEPTEMBER 1971"
       link="http://hdl.handle.net/2060/19710027908"/>

      <reference refID="NASA-TM-88354" author="Seth B. Anderson"
       title="A Look at Handling Qualities of Canard Configurations" date="September 1986"
       link="http://hdl.handle.net/2060/19870013196"/>

      <reference refID="NASA TM 110394" author="Eugene L. Tu"
       title="Numerical Study of Steady and Unsteady Canard-Wing-Body Aerodynamics" date="August 1996"
       link="http://hdl.handle.net/2060/19960047050"/>

      <reference refID="Bethesda, Md. 20084" author="David W. Lacey"
       title="AERODYNAMIC CHARACTERISTICS OF THE CLOSE-COUPLED CANARD" date="Jan 1979"
       link="http://ntrs.nasa.gov/archive/nasa/casi.ntrs.nasa.gov/19750004860.pdf"/>

       <reference refID="NASA-TN-D-7505" author="Gloss, B. B."
       title="Effect of canard location and size on canard-wing interference and aerodynamic center shift related to maneuvering aircraft at transonic speeds" date="Jun 01, 1974"
       link="http://hdl.handle.net/2060/19740020361"/>
  </fileheader>


 <metrics>
      <!-- from NASA document -->
      <wingarea unit="M2">       46.0     </wingarea><!-- main wings --><!-- from Saab windtunnel data document -->
      <wingspan unit="M">        10.0     </wingspan><!-- main wings --><!-- from Saab windtunnel data document -->
      <chord unit="M">            7.4     </chord><!-- ref. chord from Saab windtunnel data document (its the root chord),
                                                       the real MAC is 4.73 meter (Datcom+ Pro) -->
      <htailarea unit="M2">      46.0     </htailarea><!-- using main wings for this since they act as htail also -->
      <!-- data calculated using DATCOM+ Pro -->
      <vtailarea unit="M2">      5.115   </vtailarea>
      <htailarm  unit="M" >      4.5785  </htailarm>
      <vtailarm  unit="M" >      5.8515  </vtailarm>
      <!-- Measured using Saab diagram in Gimp -->
      <wing_incidence unit="DEG"> 0.00    </wing_incidence>
    <location name="AERORP" unit="M">
      <x> 1.90878 </x>
      <y> 0 </y>
      <z> -0.20081 </z>
    </location>
    <location name="EYEPOINT" unit="M">
      <x> -3.40 </x>
      <y>  0.00 </y>
      <z>  0.70 </z>
    </location>
    <location name="VRP" unit="M"><!-- Vehicle Reference Point -->
      <x> 0 </x>
      <y> 0 </y>
      <z> 0 </z>
    </location>
    <pitot_angle unit="DEG"> 0.0 </pitot_angle>
  </metrics>

<!-- CoG and AeroRP:

Page 47: stability margin at low speed
will be on the order of O.3 - 0.5 m, which is a rather representative measure
of the distance between the neutral point and the point of gravity in respect
to an airplane of that size). [about prototype for AJ37, the attack variant]

AeroRP:

Bombers airfoil analysis says 0.257 chord (1.9018 m) from leading edge (x=0.30698 m), so that gives Aerorp x=2.20878 m.
Setting the aerorp at main wing height z=-0.20081, this also makes the roll damping work much more effective.

However on the model the landing gear is 0.3 meters too much forward, so when landing it will be difficult to touch down the nose wheel.
For that reason it will be moved 0.3 meters forward from 2.20878 meters.

CoG:

Page 43: STA X65B = 12350mm [about prototype for AJ37, the attack variant], 1155mm after the flaps trailing edge (x=0.22 m) which gives x=1.375 m

Now the JA37 had longer fuselage due to longer engine, also the more powerful engine was most certainly heavier.
That means the CoG would have been further aft on the JA37 compared to the prototype for AJ37. It also makes sense for a fighter to have less longitudal stability compared to the attack variant.

So the static margin of 0.3 meter does sound reasonable even though thats from the prototype.

Old values:
<x> 0.6399 </x>
<x> 0.3399 </x>
 -->

  <mass_balance>
    <!-- Datcom+ Pro -->
    <ixx unit="KG*M2">  19541.0273  </ixx>
    <iyy unit="KG*M2">  71224.5781  </iyy>
    <izz unit="KG*M2">  65561.6250  </izz>
    <ixz unit="KG*M2">   3210.2346  </ixz>
    <!-- AeromatiC++ 3.2.5 -->
    <!--<ixx unit="KG*M2">  21960.58  </ixx>
    <iyy unit="KG*M2">  88334.06  </iyy>
    <izz unit="KG*M2">  78179.33  </izz>-->
    <emptywt unit="LBS" > 23657.81 </emptywt><!-- Swedish airforce website (Is for JA37Di) -->
    <location name="CG" unit="M">
      <x> 1.64878 </x>
      <!--  -->
      <y> 0 </y>
      <z> 0 </z>
    </location>
    <pointmass name="Pilot">
      <weight unit="LBS"> 165 </weight>
      <location name="POINTMASS" unit="M">
        <x> -3.3 </x>
        <y>  0.0 </y>
        <z>  0.2 </z>
      </location>
    </pointmass>
    <pointmass name="Left wing pylon">
      <weight unit="LBS"> 0 </weight>
      <location name="POINTMASS" unit="M">
        <x> 3.15986 </x>
        <y> -2.70311 </y>
        <z> -0.67645 </z>
      </location>
    </pointmass>
    <pointmass name="Left fuselage pylon">
      <weight unit="LBS"> 0 </weight>
      <location name="POINTMASS" unit="M">
        <x> -1.02697 </x>
        <y> -0.98148 </y>
        <z> -0.94307 </z>
      </location>
    </pointmass>
    <pointmass name="Right wing pylon">
      <weight unit="LBS"> 0 </weight>
      <location name="POINTMASS" unit="M">
        <x> 3.15986 </x>
        <y> 2.70311 </y>
        <z> -0.67645 </z>
      </location>
    </pointmass>
    <pointmass name="Right fuselage pylon">
      <weight unit="LBS"> 0 </weight>
      <location name="POINTMASS" unit="M">
        <x> -1.02697 </x>
        <y> 0.98148 </y>
        <z> -0.94307 </z>
      </location>
    </pointmass>
    <pointmass name="Left outer wing pylon">
      <weight unit="LBS"> 0 </weight>
      <location name="POINTMASS" unit="M">
        <x> 4.05216 </x>
        <y> -3.94417 </y>
        <z> -0.73722 </z>
      </location>
    </pointmass>
    <pointmass name="Right outer wing pylon">
      <weight unit="LBS"> 0 </weight>
      <location name="POINTMASS" unit="M">
        <x> 4.05216 </x>
        <y> 3.94417 </y>
        <z> -0.73722 </z>
      </location>
    </pointmass>
    <pointmass name="Center fuselage pylon">
      <weight unit="LBS"> 224.87 </weight> <!-- Estimate by David Culp, notice when this change also change it in nasal scripts and aero section -->
      <location name="POINTMASS" unit="M">
        <x>  0.52406 </x>
        <y>  0.00 </y>
        <z> -1.25748 </z>
      </location>
    </pointmass>
  </mass_balance>

  <ground_reactions>
    <contact type="BOGEY" name="NOSE_LG">
      <location unit="M">
        <x> -3.37534 </x>
        <y> 0 </y>
        <z> -2.1 </z>
      </location>
      <!-- sources say brakes could hold afterburner, the front is so high due to if rear is high, heavy crosswind landings will fail. -->
      <static_friction>  0.900 </static_friction>
      <dynamic_friction> 0.25 </dynamic_friction>
      <rolling_friction> 0.01 </rolling_friction>
      <spring_coeff unit="LBS/FT"> 40000 </spring_coeff><!-- hardness of spring. Low value means gear collapses more per energy applied. High value might give jsbsim trouble. -->
      <damping_coeff unit="LBS/FT/SEC"> 7500 </damping_coeff><!-- higher value slows down how fast the gear absorbs energy -->
      <damping_coeff_rebound unit="LBS/FT/SEC"> 20000 </damping_coeff_rebound><!-- high value means the gear is slower to release the energy it stored when collapsed -->
      <max_steer unit="DEG"> 30 </max_steer>
      <brake_group> LEFT </brake_group><!-- FG do not use CENTER, TAIL or NOSE braking group, so must use LEFT or RIGHT -->
      <retractable>1</retractable>
    </contact>
    <contact type="BOGEY" name="LEFT_MLG">
      <location unit="M">
        <x>  2.64670 </x>
        <y> -2.15204 </y>
        <z> -2.1 </z>
      </location>
      <static_friction>  0.900 </static_friction><!-- double bogey means double value -->
      <dynamic_friction> 0.5 </dynamic_friction><!-- double bogey means double value -->
      <rolling_friction> 0.02 </rolling_friction><!-- double bogey means double value -->
      <spring_coeff unit="LBS/FT"> 37500 </spring_coeff>
      <damping_coeff unit="LBS/FT/SEC"> 7000 </damping_coeff>
      <damping_coeff_rebound unit="LBS/FT/SEC"> 30000 </damping_coeff_rebound>
      <max_steer unit="DEG"> 0.0 </max_steer>
      <brake_group> LEFT </brake_group>
      <retractable>1</retractable>
    </contact>
    <contact type="BOGEY" name="RIGHT_MLG">
      <location unit="M">
        <x> 2.64670 </x>
        <y> 2.15204 </y>
        <z> -2.1 </z>
      </location>
      <static_friction>  0.900 </static_friction><!-- double bogey means double value -->
      <dynamic_friction> 0.5 </dynamic_friction><!-- double bogey means double value -->
      <rolling_friction> 0.02 </rolling_friction><!-- double bogey means double value -->
      <spring_coeff unit="LBS/FT"> 37500 </spring_coeff>
      <damping_coeff unit="LBS/FT/SEC"> 7000 </damping_coeff>
      <damping_coeff_rebound unit="LBS/FT/SEC"> 30000 </damping_coeff_rebound>
      <max_steer unit="DEG"> 0.0 </max_steer>
      <brake_group> RIGHT </brake_group>
      <retractable>1</retractable>
    </contact>
    <contact type="STRUCTURE" name="LEFT_WT">
      <location unit="M">
        <x> 5.65783 </x>
        <y> -5.09762 </y>
        <z> -0.3954 </z>
      </location>
      <static_friction> 5.0 </static_friction>
      <dynamic_friction> 4.0 </dynamic_friction>
      <spring_coeff unit="LBS/FT"> 10000 </spring_coeff>
      <damping_coeff unit="LBS/FT/SEC"> 2000 </damping_coeff>
      <damping_coeff_rebound unit="LBS/FT/SEC"> 40000 </damping_coeff_rebound>
    </contact>
    <contact type="STRUCTURE" name="RIGHT_WT">
      <location unit="M">
        <x> 5.65783 </x>
        <y> 5.09763 </y>
        <z> -0.3954 </z>
      </location>
      <static_friction> 5.0 </static_friction>
      <dynamic_friction> 4.0 </dynamic_friction>
      <spring_coeff unit="LBS/FT"> 10000 </spring_coeff>
      <damping_coeff unit="LBS/FT/SEC"> 2000 </damping_coeff>
      <damping_coeff_rebound unit="LBS/FT/SEC"> 40000 </damping_coeff_rebound>
    </contact>
    <contact type="STRUCTURE" name="TOP_VT">
      <location unit="M">
        <x> 5.64575 </x>
        <y> 0 </y>
        <z> 3.41594 </z>
      </location>
      <static_friction> 5.0 </static_friction>
      <dynamic_friction> 4.0 </dynamic_friction>
      <spring_coeff unit="LBS/FT"> 10000 </spring_coeff>
      <damping_coeff unit="LBS/FT/SEC"> 2000 </damping_coeff>
      <damping_coeff_rebound unit="LBS/FT/SEC"> 40000 </damping_coeff_rebound>
    </contact>
    <contact type="STRUCTURE" name="RADARDOME">
      <location unit="M">
        <x> -7.25245 </x>
        <y> 0 </y>
        <z> -0.53892 </z>
      </location>
      <static_friction> 5.0 </static_friction>
      <dynamic_friction> 4.0 </dynamic_friction>
      <spring_coeff unit="LBS/FT"> 10000 </spring_coeff>
      <damping_coeff unit="LBS/FT/SEC"> 2000 </damping_coeff>
      <damping_coeff_rebound unit="LBS/FT/SEC"> 40000 </damping_coeff_rebound>
    </contact>
    <contact type="STRUCTURE" name="CANOPY">
      <location unit="M">
        <x> -3.94918 </x>
        <y> 0 </y>
        <z> 0.8438 </z>
      </location>
      <static_friction> 5.0 </static_friction>
      <dynamic_friction> 4.0 </dynamic_friction>
      <spring_coeff unit="LBS/FT"> 10000 </spring_coeff>
      <damping_coeff unit="LBS/FT/SEC"> 2000 </damping_coeff>
      <damping_coeff_rebound unit="LBS/FT/SEC"> 40000 </damping_coeff_rebound>
    </contact>
    <contact type="STRUCTURE" name="LEFT_CANARD_TIP">
      <location unit="M">
        <x> -0.59304 </x>
        <y> -2.56202 </y>
        <z> 0.14643 </z>
      </location>
      <static_friction> 5.0 </static_friction>
      <dynamic_friction> 4.0 </dynamic_friction>
      <spring_coeff unit="LBS/FT"> 10000 </spring_coeff>
      <damping_coeff unit="LBS/FT/SEC"> 2000 </damping_coeff>
      <damping_coeff_rebound unit="LBS/FT/SEC"> 40000 </damping_coeff_rebound>
    </contact>
    <contact type="STRUCTURE" name="RIGHT_CANARD_TIP">
      <location unit="M">
        <x> -0.59304 </x>
        <y> 2.56202 </y>
        <z> 0.14643 </z>
      </location>
      <static_friction> 5.0 </static_friction>
      <dynamic_friction> 4.0 </dynamic_friction>
      <spring_coeff unit="LBS/FT"> 10000 </spring_coeff>
      <damping_coeff unit="LBS/FT/SEC"> 2000 </damping_coeff>
      <damping_coeff_rebound unit="LBS/FT/SEC"> 40000 </damping_coeff_rebound>
    </contact>
    <contact type="STRUCTURE" name="EXHAUST">
      <location unit="M">
        <x> 6.78812 </x>
        <y> 0 </y>
        <z> -0.59328 </z>
      </location>
      <static_friction> 5.0 </static_friction>
      <dynamic_friction> 4.0 </dynamic_friction>
      <spring_coeff unit="LBS/FT"> 10000 </spring_coeff>
      <damping_coeff unit="LBS/FT/SEC"> 2000 </damping_coeff>
      <damping_coeff_rebound unit="LBS/FT/SEC"> 40000 </damping_coeff_rebound>
    </contact>
    <contact type="STRUCTURE" name="CENTER_PYLON">
      <location unit="M">
        <x> 0.37482 </x>
        <y> 0 </y>
        <z> -0.98881 </z>
      </location>
      <static_friction> 5.0 </static_friction>
      <dynamic_friction> 4.0 </dynamic_friction>
      <spring_coeff unit="LBS/FT"> 10000 </spring_coeff>
      <damping_coeff unit="LBS/FT/SEC"> 2000 </damping_coeff>
      <damping_coeff_rebound unit="LBS/FT/SEC"> 40000 </damping_coeff_rebound>
    </contact>
  </ground_reactions>

  <propulsion>
    <engine file="RM8B">
      <location unit="M"><!-- inlet -->
        <x> -3.4 </x>
        <y> 0 </y>
        <z> 0 </z>
      </location>
      <orient unit="DEG">
        <roll> 0.0 </roll>
        <pitch> 0 </pitch>
        <yaw> 0 </yaw>
      </orient>
      <feed>0</feed>
      <thruster file="direct">
        <location unit="M"> <!-- exhaust, not end of reverser system -->
          <x> 6.0 </x>
          <y> 0 </y>
          <z> 0 </z>
        </location>
        <orient unit="DEG">
          <roll> 0.0 </roll>
          <pitch> 0.0 </pitch>
          <yaw> 0.0 </yaw>
        </orient>
      </thruster>
    </engine>

    <tank type="FUEL"><!-- fuel type used: JP-4 with density of 6.48 -->
      <!-- Fuselage Main Tank 1 -->
      <location unit="M">
        <x> 1.64878 </x>
        <y> 0.00 </y>
        <z> 0.51982 </z>
      </location>
      <radius unit="M"> 0.50 </radius>
      <capacity unit="KG"> 1500 </capacity>
      <contents unit="KG"> 1500 </contents>
      <temperature> 59 </temperature>
      <density unit="LBS/GAL"> 6.48 </density>
      <type>JP-4</type>
      <priority> 1 </priority>
    </tank>
    <tank type="FUEL">
      <!-- Fuselage Forward Tank 2 -->
      <location unit="M">
        <x> -2.24 </x>
        <y>  0.00 </y>
        <z>  0.30 </z>
      </location>
      <radius unit="M"> 0.50 </radius>
      <capacity unit="KG"> 750 </capacity>
      <contents unit="KG"> 750 </contents>
      <temperature> 59 </temperature>
      <density unit="LBS/GAL"> 6.48 </density>
      <type>JP-4</type>
      <priority> 0 </priority>
    </tank>
    <tank type="FUEL">
      <!-- Left Fuselage Minor Tank 3V -->
      <location unit="M">
        <x> -0.50305 </x>
        <y> -0.7 </y>
        <z>  0.52599 </z>
      </location>
      <radius unit="M"> 0.15 </radius>
      <capacity unit="KG"> 250 </capacity>
      <contents unit="KG"> 250 </contents>
      <temperature> 59 </temperature>
      <density unit="LBS/GAL"> 6.48 </density>
      <type>JP-4</type>
      <priority> 0 </priority>
    </tank>
    <tank type="FUEL">
      <!-- Right Fuselage Minor Tank 3H -->
      <location unit="M">
        <x> -0.50305 </x>
        <y>  0.7 </y>
        <z>  0.52599 </z>
      </location>
      <radius unit="M"> 0.15 </radius>
      <capacity unit="KG"> 250 </capacity>
      <contents unit="KG"> 250 </contents>
      <temperature> 59 </temperature>
      <density unit="LBS/GAL"> 6.48 </density>
      <type>JP-4</type>
      <priority> 0 </priority>
    </tank>
    <tank type="FUEL">
      <!-- Left Minor Wing Tank 5V -->
      <location unit="M">
        <x>  1.20 </x>
        <y> -1.66 </y>
        <z> -0.28 </z>
      </location>
      <radius unit="M"> 0.15 </radius>
      <capacity unit="KG"> 227 </capacity>
      <contents unit="KG"> 227 </contents>
      <temperature> 59 </temperature>
      <density unit="LBS/GAL"> 6.48 </density>
      <type>JP-4</type>
      <priority> 0 </priority>
    </tank>
    <tank type="FUEL">
      <!-- Right Minor Wing Tank 5H -->
      <location unit="M">
        <x>  1.20 </x>
        <y>  1.66</y>
        <z> -0.28 </z>
      </location>
      <radius unit="M"> 0.15 </radius>
      <capacity unit="KG"> 227 </capacity>
      <contents unit="KG"> 227 </contents>
      <temperature> 59 </temperature>
      <density unit="LBS/GAL"> 6.48 </density>
      <type>JP-4</type>
      <priority> 0 </priority>
    </tank>
    <tank type="FUEL">
      <!-- Left wing tank 4V -->
      <location unit="M">
        <x>  4.50696 </x>
        <y> -2.39707 </y>
        <z> -0.30 </z>
      </location>
      <radius unit="M"> 0.50 </radius>
      <capacity unit="KG"> 625 </capacity>
      <contents unit="KG"> 625 </contents>
      <temperature> 59 </temperature>
      <density unit="LBS/GAL"> 6.48 </density>
      <type>JP-4</type>
      <priority> 0 </priority>
    </tank>
    <tank type="FUEL">
      <!-- Right wing tank 4H -->
      <location unit="M">
        <x>  4.50696 </x>
        <y>  2.39707 </y>
        <z> -0.30 </z>
      </location>
      <radius unit="M"> 0.50 </radius>
      <capacity unit="KG"> 625 </capacity>
      <contents unit="KG"> 625 </contents>
      <temperature> 59 </temperature>
      <density unit="LBS/GAL"> 6.48 </density>
      <type>JP-4</type>
      <priority> 0 </priority>
    </tank>
    <tank type="FUEL">
      <!-- Drop tank -->
      <location unit="M">
        <x>  0.52406 </x>
        <y>  0.00 </y>
        <z> -1.25748 </z>
      </location>
      <radius unit="M"> 0.25 </radius>
      <capacity unit="KG"> 1190 </capacity><!-- Swedish airforce website -->
      <contents unit="KG"> 0 </contents>
      <temperature> 59 </temperature>
      <density unit="LBS/GAL"> 6.48 </density>
      <type>JP-4</type>
      <priority> 0 </priority>
    </tank>
  </propulsion>

  <flight_control file="Systems/jsb-controls"/>
  <aerodynamics file="ja37-aerodynamics.xml"/>
  <system file="jsb-hydraulic"/>
  <system file="jsb-flight"/>
  <system file="jsb-indicators"/>
  <system file="jsb-cannon_recoil"/>
  <system file="jsb-electric"/>
  <system file="jsb-fuel"/>


  <!--  Carrier (note, these functions are not offical. As the real Viggen did not have carrier capacity, and so is not documented) -->

  <system file="jsb-catapult_free"/>
  <system file="jsb-holdback_free"/>
  <system file="jsb-cat-hold"/>
  <system file="jsb-hook"/>

  <external_reactions>
    <force name="recoil" frame="BODY">
      <location unit="M">
        <x>    0.0 </x>
        <y>    0.0 </y>
        <z>    1.2 </z>
      </location>
      <direction>
        <x>  -1.0 </x>
        <y>   0.0 </y>
        <z>   0.0 </z>
      </direction>
    </force>

    <force name="hook" frame="WIND">
      <location unit="M">
        <x>    5.16180 </x>
        <y>    0.00000 </y>
        <z>   -0.75707 </z>
      </location>
      <direction>
        <x>  -1.0 </x>
        <y>   0.0 </y>
        <z>   0.0 </z>
      </direction>
    </force>

    <force name="catapult" frame="LOCAL">
        <location unit="IN">
            <x>  -30 </x>
            <y>    0.0 </y>
            <z>  -39.0 </z>
        </location>
        <direction>
            <x>1</x>
            <y>0</y>
            <z>0.08</z>
        </direction>
    </force>

    <!--Catapult   vertical force when necessary to keep the right position on the catapult rail-->
    <force name="cat-hold" frame="BODY">
    <location unit="IN">
        <x>  -30 </x>
        <y>    0.0 </y>
        <z>  -39.0 </z>
    </location>
    <direction>
        <x>0</x>
        <y>0</y>
        <z>1 </z>
    </direction>
    </force>

    <force name="holdback" frame="BODY">
    <location unit="IN">
        <x> 211</x>
        <y>    0.0 </y>
        <z>  -39.0 </z>
    </location>
    <direction>
        <x>   -1.0 </x>
        <y>    0.0 </y>
        <z>    -0.15 </z>
    </direction>
    </force>

    <force name="catapult_free" frame="BODY">
        <location unit="IN">
            <x> -30.0 </x>
            <y>  0.0 </y>
            <z>  0 </z>
        </location>
        <direction>
            <x> 1</x>
            <y>  0 </y>
            <z> 0.35 </z>
        </direction>
    </force>

    <force name="holdback_free" frame="BODY">
        <location unit="IN">
            <x> 40 </x>
            <y>  0.0 </y>
            <z>  -20.0 </z>
        </location>
        <direction>
            <x>   -1.0 </x>
            <y>    0.0 </y>
            <z>    0.0 </z>
        </direction>
    </force>
  </external_reactions>


<!--<output name="C:/Users/Nikolai/Documents/ja37_datalog.csv" type="CSV" rate="10">
    <property> /position/latitude-deg </property>
    <property> /position/longitude-deg </property>
    <property> /position/altitude-ft </property>-->
    <!--<property> /sim/time/date-log </property>
    <property> /sim/time/time-log </property>-->
    <!--<value>0</value>-->
    <!--    <property> aero/qbar-psf </property>
    <property> attitude/phi-rad </property>
    <property> position/h-sl-ft </property>
    <property> velocities/vc-kts </property>
    <property> fcs/throttle-cmd-norm </property>
    <property> fcs/elevator-cmd-norm </property>
    <property> fcs/pitch-trim-cmd-norm </property>
    <property> propulsion/total-fuel-lbs </property>
    <property> flight-path/gamma-rad </property>
    <property> accelerations/n-pilot-z-norm </property>
    <property> accelerations[0]/Nz </property>-->
    <!--<simulation> OFF </simulation>
    <rates> OFF </rates>
    <velocities> OFF </velocities>
    <forces> OFF </forces>
    <moments> OFF </moments>
    <position> OFF </position>
    <coefficients> OFF </coefficients>
    <fcs> OFF </fcs>
    <propulsion> OFF </propulsion>
    <aerosurfaces> OFF </aerosurfaces>
    <ground_reactions> OFF </ground_reactions>
  </output>-->

  <!--<output name="C:/Users/Nikolai/Documents/missile_datalog.csv" type="CSV" rate="40">
    <property> /logging/missile/latitude-deg </property>
    <property> /logging/missile/longitude-deg </property>
    <property> /logging/missile/altitude-ft </property>
    <simulation> OFF </simulation>
    <rates> OFF </rates>
    <velocities> OFF </velocities>
    <forces> OFF </forces>
    <moments> OFF </moments>
    <position> OFF </position>
    <coefficients> OFF </coefficients>
    <fcs> OFF </fcs>
    <propulsion> OFF </propulsion>
    <aerosurfaces> OFF </aerosurfaces>
    <ground_reactions> OFF </ground_reactions>
  </output>

  <output name="C:/Users/Nikolai/Documents/target_datalog.csv" type="CSV" rate="40">
    <property> /logging/missile/t-latitude-deg </property>
    <property> /logging/missile/t-longitude-deg </property>
    <property> /logging/missile/t-altitude-ft </property>
    <simulation> OFF </simulation>
    <rates> OFF </rates>
    <velocities> OFF </velocities>
    <forces> OFF </forces>
    <moments> OFF </moments>
    <position> OFF </position>
    <coefficients> OFF </coefficients>
    <fcs> OFF </fcs>
    <propulsion> OFF </propulsion>
    <aerosurfaces> OFF </aerosurfaces>
    <ground_reactions> OFF </ground_reactions>
  </output>-->

</fdm_config>
